*Heading
** Job name: Wang_Stiffened_Shell-Combined Model name: Wang_Stiffened_Shell-Non-Uniform-Pressure_and_compression
** Generated by: Abaqus/CAE 2019
*Preprint, echo=NO, model=NO, history=NO, contact=NO
**
** PARTS
**
*Part, name=Part-3
*Node
      1,    137.81868,   480.630859,         500.
      2,   134.772888,   470.008911,         500.
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*Element, type=S4R
1,   1,   2, 737, 738
2, 738, 737,   3,   4
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*Nset, nset=Set-Cone
    1,    4,    6,    7,   10,   11
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*Elset, elset=Set-Cone
  184,  185,  186,  187,  189,  190
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*Nset, nset=Set-Top_EDGE
  645,  646,  647,  648,  649,  650
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*Elset, elset=Set-Top_EDGE
 1308, 1309, 1316, 1317, 1322, 1323
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*Nset, nset=Set-Bottom_EDGE
   1,   4,   6,   7,  10,  11
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*Elset, elset=Set-Bottom_EDGE
    1,    2,    3,    4,    5,    6
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*Nset, nset=_PickedSet6_#2, internal
    1,    4,    6,    7,   10,   11
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*Elset, elset=_PickedSet6_#2, internal
  184,  185,  186,  187,  189,  190
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*Nset, nset=Part-2-AxialStiffener
   1,   2,   3,   4,   5,   6
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*Elset, elset=Part-2-AxialStiffener
  181,  182,  183,  188,  191,  194
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*Nset, nset=Part-R-0_RadialStiffener
  645,  646,  647,  648,  649,  650
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*Elset, elset=Part-R-0_RadialStiffener, generate
 1441,  1530,     1
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*Nset, nset=Part-R-7_RadialStiffener
   1,   2,   3,   4,   5,   6
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*Elset, elset=Part-R-7_RadialStiffener, generate
  1,  90,   1
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*Elset, elset=Set-Circum
    1,    2,    3,    4,    5,    6
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** Section: Section-Stiffener
*Shell Section, elset=Set-Circum, material=Alu, controls=EC-1
3., 5
** Section: Section-Stiffener
*Shell Section, elset=Part-2-AxialStiffener, material=Alu, controls=EC-1
3., 5
** Section: Section-Skin
*Shell Section, elset=Set-Cone, material=Alu, controls=EC-1
2.1, 5
*End Part
**
**
** ASSEMBLY
**
*Assembly, name=Assembly
**
*Instance, name=Part-3-1, part=Part-3
*End Instance
**
*Node
      1,           0.,           0.,           0.
*Node
      2,           0.,           0.,         500.
*Nset, nset=RP-1
 1,
*Nset, nset=RP-2
 2,
*Nset, nset=Set-8, instance=Part-3-1
 656,
*Nset, nset=Set-9
 1,
*Nset, nset=Set-10, instance=Part-3-1
 172,
*Nset, nset=_PickedSet121, internal
 1,
*Nset, nset=_PickedSet123, internal
 2,
*Nset, nset=_PickedSet125, internal
 1,
*Nset, nset=_PickedSet127, internal
 2,
*Elset, elset=_Surf-1_SNEG, internal, instance=Part-3-1
  184,  185,  186,  187,  189,  190
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*Surface, type=ELEMENT, name=Surf-1
_Surf-1_SNEG, SNEG
*Elset, elset=_Surf-2_SNEG, internal, instance=Part-3-1
  198,  199,  203,  204,  209,  210
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*Surface, type=ELEMENT, name=Surf-2
_Surf-2_SNEG, SNEG
*Elset, elset=_Surf-3_SNEG, internal, instance=Part-3-1
  184,  185,  186,  187,  192,  193
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*Surface, type=ELEMENT, name=Surf-3
_Surf-3_SNEG, SNEG
*Elset, elset=_Surf-4_SNEG, internal, instance=Part-3-1
  189,  190,  195,  196,  201,  202
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*Surface, type=ELEMENT, name=Surf-4
_Surf-4_SNEG, SNEG
*Elset, elset=_Surf-5_SNEG, internal, instance=Part-3-1
  207,  208,  213,  214,  219,  220
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*Surface, type=ELEMENT, name=Surf-5
_Surf-5_SNEG, SNEG
*Elset, elset=_Surf-6_SNEG, internal, instance=Part-3-1
  225,  226,  231,  232,  237,  238
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*Surface, type=ELEMENT, name=Surf-6
_Surf-6_SNEG, SNEG
** Constraint: Constraint-1
*Rigid Body, ref node=RP-1, tie nset=Part-3-1.Part-R-0_RadialStiffener
** Constraint: Constraint-2
*Rigid Body, ref node=RP-2, tie nset=Part-3-1.Part-R-7_RadialStiffener
*End Assembly
**
** ELEMENT CONTROLS
**
*Section Controls, name=EC-1, ELEMENT DELETION=YES
1., 1., 1.
*Amplitude, name=Amp-1
             0.,              1.,              1.,              1.
*Amplitude, name=Amp-2
           0.01,            0.01,            0.02,            0.02,            0.03,            0.03,            0.04,            0.04
           0.05,            0.05,            0.06,            0.06,            0.07,            0.07,            0.08,            0.08
           0.09,            0.09,             0.1,             0.1,            0.11,            0.11,            0.12,            0.12
           0.13,            0.13,            0.14,            0.14,            0.15,            0.15,            0.16,            0.16
           0.17,            0.17,            0.18,            0.18,            0.19,            0.19,             0.2,             0.2
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           0.97,            0.97,            0.98,            0.98,            0.99,            0.99,              1.,              1.
**
** MATERIALS
**
*Material, name=Alu
*Damage Initiation, criterion=DUCTILE
 0.15965,0.,0.
*Damage Evolution, type=ENERGY, degradation=MULTIPLICATIVE
 2530.6,
*Density
 7.8e-09,
*Elastic
155281., 0.3
*Plastic
 405.298,        0.
 419.766, 0.0117267
 432.167, 0.0142969
 444.568,  0.016117
 454.902, 0.0187005
 465.236, 0.0205239
 477.637,  0.023094
 490.038, 0.0252842
 500.372, 0.0278676
 510.706, 0.0308311
  521.04, 0.0334145
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 494.171,  0.241008
**
** BOUNDARY CONDITIONS
**
** Name: BC Bottom Type: Displacement/Rotation
*Boundary
_PickedSet127, 1, 1
_PickedSet127, 2, 2
_PickedSet127, 3, 3
_PickedSet127, 4, 4
_PickedSet127, 5, 5
_PickedSet127, 6, 6
** Name: BC Top Type: Displacement/Rotation
*Boundary
_PickedSet125, 1, 1
_PickedSet125, 2, 2
_PickedSet125, 4, 4
_PickedSet125, 5, 5
_PickedSet125, 6, 6
** ----------------------------------------------------------------
**
** STEP: Step-1
**
*Step, name=Step-1, nlgeom=YES
*Dynamic, Explicit
, 1.
*Bulk Viscosity
0.06, 1.2
**
** LOADS
**
** Name: Load-2   Type: Concentrated force
*Cload, amplitude=Amp-1
Set-9, 3, 1340.
** Name: Load-3   Type: Pressure
*Dsload, amplitude=Amp-2
Surf-2, P, 10.
** Name: Load-4   Type: Pressure
*Dsload, amplitude=Amp-2
Surf-3, P, 8.
** Name: Load-5   Type: Pressure
*Dsload, amplitude=Amp-2
Surf-4, P, 6.
** Name: Load-6   Type: Pressure
*Dsload, amplitude=Amp-2
Surf-5, P, 4.5
** Name: Load-7   Type: Pressure
*Dsload, amplitude=Amp-2
Surf-6, P, 3.25
**
** OUTPUT REQUESTS
**
*Restart, write, number interval=1, time marks=NO
**
** FIELD OUTPUT: F-Output-1
**
*Output, field, time interval=0.01
*Node Output
CF, RF, U
*Element Output, directions=YES
LE, P, PE, PEEQ, PEMAG, S, STATUS
*Contact Output
CDISP, CSTRESS
**
** HISTORY OUTPUT: H-Output-1
**
*Output, history, variable=PRESELECT, frequency=1
*End Step
